OpenVSP model (file version 5), 1 components.
Geometry view with OpenVSP parameter names; values to 6 digits, angles in degrees, lengths in the model's unit.

Wing "WingGeom"
  location (X Y Z) 0 0 0, rotation 0 0 0
  symmetric about XZ
  bounding box size 2.0003 14.5 0.226563
  totals: TotalSpan=14.5 TotalProjectedSpan=14.5 TotalChord=1.25 TotalArea=18.125 TotalAR=11.6
  root: chord 2, twist 0, airfoil file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 BaseThickChord=0.114912 ThickChord=0.114912
  sections:
    n  Span  Root_Chord  Tip_Chord  Area    Sweep    Sweep_Location  Dihedral  Twist  Twist_Location  tip airfoil
    1  7.25  2           0.5        9.0625  5.90614  0               0         -3     0.25            airfoil file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 BaseThickChord=0.106871 ThickChord=0.106871
