OpenVSP model (file version 5), 1 components.
Geometry view with OpenVSP parameter names; values to 6 digits, angles in degrees, lengths in the model's unit.

Wing "WingGeom"
  location (X Y Z) 0 0 0, rotation 0 0 0
  symmetric about XZ
  bounding box size 3.00008 16 0.384152
  totals: TotalSpan=16 TotalProjectedSpan=16 TotalChord=2 TotalArea=30 TotalAR=8.53333
  root: chord 3, twist 0, airfoil file "CST profile"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 BaseThickChord=0.126768 ThickChord=0.126768
  sections:
    n  Span  Root_Chord  Tip_Chord  Area  Sweep    Sweep_Location  Dihedral  Twist  Twist_Location  tip airfoil
    1  3     3           2          7.5   9.59407  0               0         0      0.25            airfoil file "MH 24"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 BaseThickChord=0.090106 ThickChord=0.090106
    2  5     2           1          7.5   5.73917  0               0         0      0.25            airfoil file "Wortmann FX 61-184"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 BaseThickChord=0.183876 ThickChord=0.183876
